# Assuming we have three nodes, the stiffness and force matrices could look like...
K := [1, 2, 3; 4, 5, 6; 7, 8, 9]
F := [1; 2; 3]
# Assuming we are solving for the temperature, say we want the node 2 temperature to equal 100. We change the node 2 position of the force matrix to equal 100. (Do NOT copy/paste any matrix just to change the values of an indice or a row/column. The values show will be rounded instead of carrying more digits which Mathcad stores in memory.)
F[1, 0] := 100
F = [1; 100; 3]
# In addition, we need to change the stiffness matrix row that represents node 2 to just have a 1 in the second column. Again, do NOT copy/paste to change the row!
K[1, :] := [0, 1, 0]
K = [1, 2, 3; 0, 1, 0; 7, 8, 9]
# Our edits result in the temperature at node 2 being equal to 100.
T := K^-1*F = [-50; 100; -49.6667]
