# (The reason for not including units is because the stiffness matrix for beams has both displacement and rotation aspects. Therefore, the units are not consistent throughout the stiffness matrix. This lack of consistency becomes a problem when multiplying the stiffness matrix by the load matrix.)
E := 10*10^6
I := 10000
ω := 1000
P := 100000
K(E, I, L) := (E*I/L^3)*[12, 6*L, -12, 6*L; 6*L, 4*L^2, -6*L, 2*L^2; -12, -6*L, 12, -6*L; 6*L, 2*L^2, -6*L, 4*L^2]
# Element 1
L := 200
L1 := L
K1 := K(E, I, L)
# Element 2
L := 100
L2 := L
K2 := K(E, I, L)
Trans1 := □  # error: Missing term or expression.
K_G1 := Trans1*K1*transpose(Trans1)
Trans2 := □  # error: Missing term or expression.
K_G2 := Trans2*K2*transpose(Trans2)
K_G := K_G1 + K_G2
F1 := [-ω*L1/2; -ω*L1^2/12; -ω*L1/2; ω*L1^2/12]
F2 := [-P/2; -P*L2/8; -P/2; P*L2/8]
F_G1 := Trans1*F1
F_G2 := Trans2*F2
F_G := F_G1 + F_G2
BC := □  # error: Missing term or expression.
K_Gr := transpose(BC)*K_G*BC
F_Gr := transpose(BC)*F_G
u := K_Gr^-1*F_Gr
u_G := BC*u
R := K_G*u_G - F_G
