# Example:
E := 10*10^6  # psi
A := 10  # in^2
I := 200  # in^4
ω := 100  # lb/in
# Find:
# 1. Displacement of each node
# Elements 1,2,3:  stiffness matrix (local coordinates, element form)
k(L) := [
    A*E/L, 0, 0, -A*E/L, 0, 0;
    0, 12*E*I/L^3, 6*E*I/L^2, 0, -12*E*I/L^3, 6*E*I/L^2;
    0, 6*E*I/L^2, 4*E*I/L, 0, -6*E*I/L^2, 2*E*I/L;
    -A*E/L, 0, 0, A*E/L, 0, 0;
    0, -12*E*I/L^3, -6*E*I/L^2, 0, 12*E*I/L^3, -6*E*I/L^2;
    0, 6*E*I/L^2, 2*E*I/L, 0, -6*E*I/L^2, 4*E*I/L
]
# Transformation Matrix (Truss)
T(a) := [
    cos(a), -sin(a), 0, 0, 0, 0;
    sin(a), cos(a), 0, 0, 0, 0;
    0, 0, 1, 0, 0, 0;
    0, 0, 0, cos(a), -sin(a), 0;
    0, 0, 0, sin(a), cos(a), 0;
    0, 0, 0, 0, 0, 1
]
# Stiffness matrices (global coordinates, element form)
# Element 1:
a := (π/180)*□
# rad
L1 := 80  # in
L := L1
T1 := T(a)
# Note: in the future, you can just define K(a,L):=T*k*T^-1 and then use it like we did T(a) in this problem!!
K_1 := T1*k(L)*transpose(T1)
# Element 2:
a := (π/180)*□
# rad
L2 := 100  # in
L := L2
T2 := T(a)
K_2 := T2*k(L)*transpose(T2)
# Stiffness matrices (global coordinates, system form)
# Element 1:
Trans1 := □  # error: Missing term or expression.
KG_1 := Trans1*K_1*transpose(Trans1)
# Element 2:
Trans2 := □  # error: Missing term or expression.
KG_2 := Trans2*K_2*transpose(Trans2)
# Global Stiffness Matrix
KG := KG_1 + KG_2
KG
# Load Matrix
F := [0; 0; 0; 0; -ω*L2/2; -ω*L2^2/12; 0; -ω*L2/2; ω*L2^2/12]
# Applying Boundary Conditions
BC := [
    0, 0, 0, 0, 0;
    0, 0, 0, 0, 0;
    0, 0, 0, 0, 0;
    1, 0, 0, 0, 0;
    0, 1, 0, 0, 0;
    0, 0, 1, 0, 0;
    0, 0, 0, 1, 0;
    0, 0, 0, 0, 0;
    0, 0, 0, 0, 1
]
KG_r := transpose(BC)*KG*BC
F_r := transpose(BC)*F
# Solution Phase
# in
# in
# rad
# in
# rad
U_r := KG_r^-1*F_r
