K := [
    1, 2, 3, 4, 5, 6;
    7, 8, 9, 10, 11, 12;
    13, 14, 15, 16, 17, 18;
    19, 20, 21, 22, 23, 24;
    25, 26, 27, 28, 29, 30;
    31, 32, 33, 34, 35, 36
]
# Call (=) or Replace (:) a specific element from a matrix:
# ("Matrix Index": the shortcut is ([); it is found on the Matrices/Tables tab > Vector/Matrix Operators)
# Call:
K[2, 3] = 16
K[3, 3] - K[0, 2] = 19
# Replace:
K[2, 3] := 300
K = [
    1, 2, 3, 4, 5, 6;
    7, 8, 9, 10, 11, 12;
    13, 14, 15, 300, 17, 18;
    19, 20, 21, 22, 23, 24;
    25, 26, 27, 28, 29, 30;
    31, 32, 33, 34, 35, 36
]
# Call (=) or Replace (:) a row in a matrix:
# ("Matrix Row": the shortcut is (Ctrl+Shift+R); it is found on the Matrices/Tables tab > Vector/Matrix Operators)
# Call:
K[0, :] = [1, 2, 3, 4, 5, 6]
# Replace:
K[0, :] := [1, 0, 0, 0, 0, 0]
K = [
    1, 0, 0, 0, 0, 0;
    7, 8, 9, 10, 11, 12;
    13, 14, 15, 300, 17, 18;
    19, 20, 21, 22, 23, 24;
    25, 26, 27, 28, 29, 30;
    31, 32, 33, 34, 35, 36
]
# Call (=) or Replace (:) a column in a matrix:
# ("Matrix Column": the shortcut is (Ctrl+Shift+C); it is found on the Matrices/Tables tab > Vector/Matrix Operators)
# Call:
K[:, 1] = [0; 8; 14; 20; 26; 32]
# Replace:
K[:, 1] := [25; 0; 0; 0; 0; 0]
K = [
    1, 25, 0, 0, 0, 0;
    7, 0, 9, 10, 11, 12;
    13, 0, 15, 300, 17, 18;
    19, 0, 21, 22, 23, 24;
    25, 0, 27, 28, 29, 30;
    31, 0, 33, 34, 35, 36
]
# To create a matrix of a specified size filled with zeros. Hint: use to make Placement matrices :-)
f(x, y) := 0
Place1 := matrix(8, 3, f) = [0, 0, 0; 0, 0, 0; 0, 0, 0; 0, 0, 0; 0, 0, 0; 0, 0, 0; 0, 0, 0; 0, 0, 0]
Place1 = [0, 0, 0; 0, 0, 0; 0, 0, 0; 0, 0, 0; 0, 0, 0; 0, 0, 0; 0, 0, 0; 0, 0, 0]
# Create a function based on variables the user will define/calc elsewhere:
T(a) := [
    cos(a), -sin(a), 0, 0, 0, 0;
    sin(a), cos(a), 0, 0, 0, 0;
    0, 0, 1, 0, 0, 0;
    0, 0, 0, cos(a), -sin(a), 0;
    0, 0, 0, sin(a), cos(a), 0;
    0, 0, 0, 0, 0, 1
]
k(A, E, I, L) := [
    A*E/L, 0, 0, -A*E/L, 0, 0;
    0, 12*E*I/L^3, 6*E*I/L^2, 0, -12*E*I/L^3, 6*E*I/L^2;
    0, 6*E*I/L^2, 4*E*I/L, 0, -6*E*I/L^2, 2*E*I/L;
    -A*E/L, 0, 0, A*E/L, 0, 0;
    0, -12*E*I/L^3, -6*E*I/L^2, 0, 12*E*I/L^3, -6*E*I/L^2;
    0, 6*E*I/L^2, 2*E*I/L, 0, -6*E*I/L^2, 4*E*I/L
]
K(A, E, I, L, a) := transpose(T(a))*k(A, E, I, L)*T(a)
A1 := 7.65
E1 := 30*10^6
I1 := 204
L1 := 9*12
a1 := 90 deg
K_1 := K(A1, E1, I1, L1, a1) = [
    58299, 0, 3148148, -58299, 0, 3148148;
    0, 2125000, 0, 0, -2125000, 0;
    3148148, 0, 226666667, -3148148, 0, 113333333;
    -58299, 0, -3148148, 58299, 0, -3148148;
    0, -2125000, 0, 0, 2125000, 0;
    3148148, 0, 113333333, -3148148, 0, 226666667
]
# To create an identity matrix...
identity(12) = [
    1, 0, 0, 0, 0, 0, 0, 0, 0, 0, 0, 0;
    0, 1, 0, 0, 0, 0, 0, 0, 0, 0, 0, 0;
    0, 0, 1, 0, 0, 0, 0, 0, 0, 0, 0, 0;
    0, 0, 0, 1, 0, 0, 0, 0, 0, 0, 0, 0;
    0, 0, 0, 0, 1, 0, 0, 0, 0, 0, 0, 0;
    0, 0, 0, 0, 0, 1, 0, 0, 0, 0, 0, 0;
    0, 0, 0, 0, 0, 0, 1, 0, 0, 0, 0, 0;
    0, 0, 0, 0, 0, 0, 0, 1, 0, 0, 0, 0;
    0, 0, 0, 0, 0, 0, 0, 0, 1, 0, 0, 0;
    0, 0, 0, 0, 0, 0, 0, 0, 0, 1, 0, 0;
    0, 0, 0, 0, 0, 0, 0, 0, 0, 0, 1, 0;
    0, 0, 0, 0, 0, 0, 0, 0, 0, 0, 0, 1
]
# Now, just copy the matrix and delete the columns of DoF that are fixed!
BC := [
    0, 0, 0, 0, 0, 0;
    0, 0, 0, 0, 0, 0;
    1, 0, 0, 0, 0, 0;
    0, 0, 0, 0, 0, 0;
    0, 1, 0, 0, 0, 0;
    0, 0, 0, 0, 0, 0;
    0, 0, 1, 0, 0, 0;
    0, 0, 0, 1, 0, 0;
    0, 0, 0, 0, 1, 0;
    0, 0, 0, 0, 0, 1;
    0, 0, 0, 0, 0, 0;
    0, 0, 0, 0, 0, 0
]
