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# Example:
E := 1*10^6 psi
A := 0.1 in^2
L := 100 in
# Find:
# 1. Displacement of each node
# 2. Support reactions
# 3. Stresses in each element
# Elements 1,2,3:  stiffness matrix (local coordinates, local form)
k := [A*E/L, 0, -A*E/L, 0; 0, 0, 0, 0; -A*E/L, 0, A*E/L, 0; 0, 0, 0, 0]  # (Note: you'll need to change the units to lbf/in!)
# Transformation Matrix (Truss)
T(a) := [cos(a), -sin(a), 0, 0; sin(a), cos(a), 0, 0; 0, 0, cos(a), -sin(a); 0, 0, sin(a), cos(a)]
# Element 1:  stiffness matrix (global coordinates, local form)
a := □
T1 := □
# Note: in the future, you can just define K(a):=T*k*T^-1 and then use it like we did T(a) in this problem!!
K_1 := □
# Element 2:  stiffness matrix (global coordinates, local form)
a := (π/180)*□  # error: This variable is undefined. Check that the label is set correctly.
T2 := □
K_2 := □
# Element 3:  stiffness matrix (global coordinates, local form)
a := (π/180)*□  # error: This variable is undefined. Check that the label is set correctly.
T3 := □
K_3 := □
# Element 1:  stiffness matrix (global coordinates, global form)
Place1 := [1, 0, 0, 0; 0, 1, 0, 0; 0, 0, 1, 0; 0, 0, 0, 1; 0, 0, 0, 0; 0, 0, 0, 0]
KG_1 := □
# Element 2:  stiffness matrix (global coordinates, global form)
Place2 := □
KG_2 := □
# Element 3:  stiffness matrix (global coordinates, global form)
Place3 := □
KG_3 := □
# Global Stiffness Matrix
KG := □
KG =  # no stored result
# Applying Boundary Conditions
BC := □
KG_r := □
FG := □
FG_r := □
# Solution Phase
U_r := □
UG := □
# Post-processing Phase: Reaction Forces
R := □
# Post-processing Phase: Stresses
U1 := transpose(Place1)*UG
u1 := T1^-1*U1  # error: This variable is undefined. Check that the label is set correctly.
σ1 := E*(-u1[0, 0] + u1[2, 0])/L  # error: This variable is undefined. Check that the label is set correctly.
