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# Problem Statement:
# Constants:
k := 0.72 W/(m*K)
T_w := (90 + 273.15) K
T_f := (-5 + 273.15) K
L := 7.5 cm - 1.7 cm/2
h_w := 200 W/(m^2*K)
h_f := 34 W/(m^2*K)
elem := 4
# Element properties:
l := L/elem
A_c := □  # error: Missing term or expression.  # ignore A_c (removed from Generic equations below)
p := □  # error: Missing term or expression.  # ignore p (removed from Generic equations below)
# Generic equations:
# Stiffness matrix for an element with convection along the element AND at the tip (node j)
K := k/l*[1, -1; -1, 1] + h*l/6*[2, 1; 1, 2] + [0, 0; 0, h_f]  # error: These units are not compatible.
# Force matrix for an element with convection along the element AND at the tip (node j)
F := h*l*T/2*[1; 1] + [0; h*T]  # error: These units are not compatible.
# Elements 1-4 (local):
# Transformation matrices:
Place1 := [1, 0; 0, 1; 0, 0; 0, 0; 0, 0]
# Elements 1-4 (system):
K_1 := Place1*K*transpose(Place1)  # error: This variable is undefined. Check that the label is set correctly.
F_1 := Place1*F  # error: This variable is undefined. Check that the label is set correctly.
KG := K_1 + □  # error: Missing term or expression.
FG := F_1 + □  # error: Missing term or expression.
# Apply Boundary Condition(s) (T @ ? = °C):
FG[□] := □  # error: Missing term or expression.  # KG[□, :]
# Solve:
# @ y = 0 cm
# @ y =
# @ y =
# ...
T := KG^-1*FG  # error: This variable is undefined. Check that the label is set correctly.
